<neuroml xmlns="http://www.neuroml.org/schema/neuroml2"  xmlns:xs="http://www.w3.org/2001/XMLSchema" xmlns:xsi="http://www.w3.org/2001/XMLSchema-instance" xsi:schemaLocation="http://www.neuroml.org/schema/neuroml2 https://raw.github.com/NeuroML/NeuroML2/development/Schemas/NeuroML2/NeuroML_v2beta5.xsd" id="IClamp_PV">
    <notes>Generated by NeuroMLlite v0.1.9
    Generated network: IClamp_PV
    Generation seed: 1234
    NeuroMLlite parameters:
        stim_amp = 4pA
        stim_delay = 100ms
        stim_dur = 50ms</notes>
    <include href="/home/padraig/git/PINGnets/NeuroML2/WangBuzsaki.cell.nml"/>
    <pulseGenerator id="iclamp_0" delay="100ms" duration="50ms" amplitude="4pA"/>
    <network id="IClamp_PV" type="networkWithTemperature" temperature="34.0degC">
        <notes>A network model: IClamp_PV</notes>
        <property tag="recommended_dt_ms" value="0.01"/>
        <property tag="recommended_duration_ms" value="300.0"/>
        <population id="pop_PV" component="PV" size="1" type="populationList">
            <property tag="region" value="CA1"/>
            <instance id="0">
                <location x="966.453535692138757" y="44.073259917535268" z="7.491470058587191"/>
            </instance>
        </population>
        <inputList id="Stim_iclamp_0" population="pop_PV" component="iclamp_0">
            <input id="0" target="../pop_PV/0/PV" destination="synapses"/>
        </inputList>
    </network>
</neuroml>
